*Heading
** Job name: PUENTE Model name: Model-1
** Generated by: Abaqus/CAE Learning Edition 2022
*Preprint, echo=NO, model=NO, history=NO, contact=NO
**
** PARTS
**
*Part, name=VIGA
*Node
      1,           0.,          25.
      2, 0.0777777806,   25.0055561
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*Element, type=B21
  1,   1,   2
  2,   2,   3
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*Nset, nset=VIGA_PRINCIPAL, generate
   1,  901,    1
*Elset, elset=VIGA_PRINCIPAL, generate
   1,  900,    1
*Nset, nset=Set-2, generate
   1,  901,    1
*Elset, elset=Set-2, generate
   1,  900,    1
** Section: VIGA_PRINCIPAL  Profile: Viga_principal
*Beam Section, elset=VIGA_PRINCIPAL, material="ACERO0 TIPO 2", temperature=GRADIENTS, section=I
0.1, 0.8, 0.6, 0.6, 0.05, 0.05, 0.05
0.,0.,-1.
*End Part
**
**
** ASSEMBLY
**
*Assembly, name=Assembly
**
*Instance, name=VIGA-1, part=VIGA
*End Instance
**
*Nset, nset=Set-1, instance=VIGA-1, generate
   1,  901,    1
*Elset, elset=Set-1, instance=VIGA-1, generate
   1,  900,    1
*Nset, nset=Set-2, instance=VIGA-1
   1, 901
*End Assembly
**
** MATERIALS
**
*Material, name="ACERO0 TIPO 1"
*Density
7800.,
*Elastic
 2.1e+11, 0.3
*Material, name="ACERO0 TIPO 2"
*Density
8750.,
*Elastic
 2.3e+11, 0.3
*Material, name=HORMIGON
*Density
2300.,
*Elastic
 2.7e+10, 0.2
** ----------------------------------------------------------------
**
** STEP: Step-1
**
*Step, name=Step-1, nlgeom=NO
*Static
1., 1., 1e-05, 1.
**
** BOUNDARY CONDITIONS
**
** Name: APOYO Type: Displacement/Rotation
*Boundary
Set-2, 1, 1
Set-2, 2, 2
**
** LOADS
**
** Name: CARGA   Type: Line load
*Dload
Set-1, PY, -110000.
**
** OUTPUT REQUESTS
**
*Restart, write, frequency=0
**
** FIELD OUTPUT: F-Output-1
**
*Output, field, variable=PRESELECT
**
** HISTORY OUTPUT: H-Output-1
**
*Output, history
*Element Output
MASS,
*Energy Output
ALLAE, ALLCD, ALLDMD, ALLEE, ALLFD, ALLIE, ALLJD, ALLKE, ALLKL, ALLPD, ALLQB, ALLSD, ALLSE, ALLVD, ALLWK, ETOTAL
*End Step
